# OpenSim document version 40000
MarkerSet:
  Marker RASI: pelvis (0.014 0.014 0.13)
  Marker LASI: pelvis (0.014 0.014 -0.13)
  Marker CLAV: torso (0.08 0.37 -0.01)
  Marker RSHO: torso (-0.020383 0.398169 0.193032)
  Marker LSHO: torso (-0.020383 0.398169 -0.193032)
  Marker RKNE: femur_r (0 -0.415 0.055)
  Marker RKNE_med: femur_r (0 -0.415 -0.051)
  Marker RTHI1: femur_r (0.055 -0.23 0.0678)
  Marker RTHI2: femur_r (-0.005 -0.23 0.0678)
  Marker RTHI3: femur_r (0.025 -0.3 0.0678)
  Marker RANK: tibia_r (0 -0.42 0.055)
  Marker RANK_med: tibia_r (0 -0.4 -0.036804)
  Marker RTIB1: tibia_r (0.04 -0.18 0.0678)
  Marker RTIB2: tibia_r (-0.02 -0.18 0.0678)
  Marker RTIB3: tibia_r (0.01 -0.25 0.0678)
  Marker LKNE: femur_l (0 -0.415 -0.055)
  Marker LKNE_med: femur_l (0 -0.415 0.051)
  Marker LTHI1: femur_l (0.055 -0.23 -0.0678)
  Marker LTHI2: femur_l (-0.005 -0.23 -0.0678)
  Marker LTHI3: femur_l (0.025 -0.3 -0.0678)
  Marker LANK: tibia_l (0 -0.42 -0.055)
  Marker LANK_med: tibia_l (0 -0.4 0.036804)
  Marker LTIB1: tibia_l (0.04 -0.18 -0.0678)
  Marker LTIB2: tibia_l (-0.02 -0.18 -0.0678)
  Marker LTIB3: tibia_l (0.01 -0.25 -0.0678)
  Marker RPSI: pelvis (-0.172322 0.0400191 0.03)
  Marker LPSI: pelvis (-0.172322 0.0400191 -0.03)
  Marker RELB: humerus_r (-0.03 -0.29 -0.01)
  Marker LELB: humerus_l (-0.035 -0.29 0.01)
  Marker RW1: radius_r (-0.01 -0.23 0.045)
  Marker RW2: ulna_r (-0.04 -0.243 0.03)
  Marker LW1: radius_l (-0.01 -0.23 -0.045)
  Marker LW2: ulna_l (-0.04 -0.243 -0.03)
  Marker hum_l2: humerus_l (0.005 -0.15 -0.03)
  Marker hum_r2: humerus_r (0.005 -0.15 0.03)
  Marker rad_l2: radius_l (-0.0177865 -0.141729 -0.00040791)
  Marker rad_r2: radius_r (-0.0177865 -0.141729 0.00040791)
  Marker LH: hand_l (-0.013 -0.07 0)
  Marker RH: hand_r (-0.013 -0.07 0)
  Marker Foot_r1: calcn_r (-0.0158495 0.025 -0.000541918)
  Marker Foot_r4: calcn_r (0.12464 0.0203519 0.045347)
  Marker Foot_r6: calcn_r (0.205292 0.016 0.0141566)
  Marker Foot_r7: toes_r (0.0577143 0.01 -0.0253208)
  Marker foot_l1: calcn_l (-0.0158495 0.0223412 0.000541918)
  Marker foot_l4: calcn_l (0.12464 0.0203519 -0.045347)
  Marker foot_l6: calcn_l (0.205292 0.016 -0.0141566)
  Marker foot_l7: toes_l (0.0577143 0.01 0.0253208)
